# OpenSim document version 30000
InverseKinematicsTool:
  results_directory: ./
  constraint_weight: Inf
  accuracy: 1e-5
  marker_file: ../MarkerData/TwoLinkArm_Pedals_001.trc
  time_range: 0 0.05
  report_errors: false
  report_marker_locations: false
  IKTaskSet:
    IKMarkerTask Link2_Marker_1: apply=true weight=10
    IKMarkerTask Link2_Marker_2: apply=false weight=1
    IKMarkerTask Link2_Marker_3: apply=false weight=1
    IKMarkerTask Link1_Marker_1: apply=true weight=1.5
    IKMarkerTask Link1_Marker_2: apply=false weight=1
    IKMarkerTask Link1_Marker_3: apply=false weight=1
    IKMarkerTask Base_Marker_1: apply=false weight=1
    IKMarkerTask Base_Marker_2: apply=false weight=1
    IKMarkerTask Base_Marker_3: apply=false weight=1
    IKMarkerTask B_pedal_sp1: apply=false weight=1
    IKMarkerTask B_pedal_sp2: apply=false weight=1
    IKMarkerTask G_pedal_sp1: apply=false weight=1
    IKMarkerTask G_pedal_sp2: apply=false weight=1
