# OpenSim document version 30000
Model Driver_Cockpit_Simp:
  length_units: meters
  force_units: N
  gravity: 0 -9.80665 0
  credits:
    Delp S.L., Loan J.P., Hoy M.G., Zajac F.E., Topp E.L., Rosen J.M., Thelen D.G., Anderson F.C., Seth A. Notes: 3D, 23 DOF gait model created by D.G. Thelen, Univ. of Wisconsin-Madison, and Ajay Seth, Frank C. Anderson, and Scott L. Delp, Stanford University. Lower extremity joint defintions based on Delp et al. (1990). Low back joint and anthropometry based on Anderson and Pandy (1999, 2001). Planar knee model of Yamaguchi and Zajac (1989). Seth replaced tibia translation constraints with a CustomJoint for the knee and removed the patella to eliminate all kinematic constraints; insertions of the quadrucepts are handled with moving points in the tibia frame as defined by Delp 1990. License: Creative Commons (CCBY 3.0). You are free to distribute, remix, tweak, and build upon this work, even commercially, as long as you credit us for the original creation. http://creativecommons.org/licenses/by/3.0/ More Information: http://simtk-confluence.stanford.edu:8080/display/OpenSim/Gait+2392+and+2354+Models
  publications:
    Delp, S.L., Loan, J.P., Hoy, M.G., Zajac, F.E., Topp E.L., Rosen, J.M.: An interactive graphics-based model of the lower extremity to study orthopaedic surgical procedures, IEEE Transactions on Biomedical Engineering, vol. 37, pp. 757-767, 1990. Yamaguchi G.T., Zajac F.E.: A planar model of the knee joint to characterize the knee extensor mechanism." J . Biomecl7. vol. 21. pp. 1-10. 1989. Anderson F.C., Pandy M.G.: A dynamic optimization solution for vertical jumping in three dimensions. Computer Methods in Biomechanics and Biomedical Engineering 2:201-231, 1999. Anderson F.C., Pandy M.G.: Dynamic optimization of human walking. Journal of Biomechanical Engineering 123:381-390, 2001.
  defaults: CoordinateActuator default: optimal_force=300
  BodySet:
    Body ground: mass=0 mass_center=(0 0 0) inertia_xx=0 inertia_yy=0 inertia_zz=0 meshes=treadmill.vtp
    Body Vehicle_Base: mass=1690 mass_center=(0 0 0) inertia_xx=615.167 inertia_yy=3163.74 inertia_zz=2861.77
        meshes=(arrow.vtp Vehicle_Base.stl)
      WeldJoint ground_vehicle: parent_body=ground location_in_parent=(0.25802 -0.043748 0.388833) location=(0 0 0)
    Body Seat_Cushion: mass=1 mass_center=(0 0 0) inertia_xx=1 inertia_yy=1 inertia_zz=1 meshes=Seat_Cushion2.stl
      WeldJoint Seat_Slider: parent_body=Vehicle_Base location_in_parent=(-0.232049 -0.214438 -0.381543)
          orientation_in_parent=(0 0 0.08100248) location=(0 0 0) orientation=(0 0 0.08100248)
    Body Floor_Cushion: mass=1 mass_center=(0 0 0) inertia_xx=1 inertia_yy=1 inertia_zz=1 meshes=box.vtp
      WeldJoint FloorCshToGround: parent_body=Vehicle_Base location_in_parent=(0.252 -0.37 -0.388833)
          orientation_in_parent=(0 0 0.07) location=(0 0 0)
    Body Floor_Pan: mass=1 mass_center=(0 0 0) inertia_xx=1 inertia_yy=1 inertia_zz=1 meshes=box.vtp
      WeldJoint FloorPnToGround: parent_body=Floor_Cushion location_in_parent=(0.295 0 0)
          orientation_in_parent=(0 0 0.76) location=(-0.21 0 0)
    Body B_Pedal: mass=0.582 mass_center=(0.025806 -0.0934156 0.0190881) inertia_xx=3.99395e-9 inertia_yy=0.733473e-9
        inertia_zz=3.78862e-9 inertia_xy=0.148338e-9 inertia_xz=-0.822541e-12 inertia_yz=1.02445e-9
        meshes=B_Pedal_2.stl
      PinJoint B_Pedal-Vehicle: parent_body=Vehicle_Base location_in_parent=(0.61933 0.059598 -0.412683)
          location=(0 0 0)
        Coordinate B_Pedal_tilt: motion_type=rotational default_value=0 range=(0 0.5235988) clamped=true
    Body G_Pedal: mass=0.0816 mass_center=(-0.060736 -0.083164 -0.013207) inertia_xx=0.27543e-9 inertia_yy=0.231347e-9
        inertia_zz=0.469878e-9 inertia_xy=-0.213794e-9 inertia_xz=-0.0453107e-9 inertia_yz=-0.047315e-9
        meshes=G_Pedal.stl
      PinJoint G_Pedal-Vehicle: parent_body=Vehicle_Base location_in_parent=(0.726582 -0.010558 -0.182547)
          location=(0 0 0)
        Coordinate G_Pedal_tilt: motion_type=rotational default_value=0 range=(0 0.3490659) clamped=true
    Body B_Pedal_Pot: mass=1 mass_center=(0 0 0) inertia_xx=1 inertia_yy=1 inertia_zz=1 meshes=sphere.vtp
      WeldJoint Pointer01: parent_body=B_Pedal location_in_parent=(0.6062112 -0.2712833 0.0379159) location=(0 0 0)
    Body G_Pedal_Pot: mass=1 mass_center=(0 0 0) inertia_xx=1 inertia_yy=1 inertia_zz=1 meshes=sphere.vtp
      WeldJoint Pointer01: parent_body=G_Pedal location_in_parent=(-0.01571353 -0.211501 -0.02685693) location=(0 0 0)
    Body pelvis: mass=11.777 mass_center=(-0.0707 0 0) inertia_xx=0.1028 inertia_yy=0.0871 inertia_zz=0.0579
        meshes=(r_pelvis.vtp l_pelvis.vtp)
      WeldJoint ground_pelvis: parent_body=Seat_Cushion location_in_parent=(0.005971 0.280186 0.00729)
          orientation_in_parent=(0 0 0.324533) location=(0 0 0)
    Body sacrum: mass=0 mass_center=(0 0 0) inertia_xx=0 inertia_yy=0 inertia_zz=0 meshes=sacrum.vtp
      WeldJoint sacrumjnt: parent_body=pelvis location_in_parent=(0.01 -0.017 0) location=(0 0 0)
    Body femur_r: mass=9.3014 mass_center=(0 -0.17 0) inertia_xx=0.1339 inertia_yy=0.0351 inertia_zz=0.1412
        meshes=femur.vtp
      CustomJoint hip_r: parent_body=pelvis location_in_parent=(-0.0707 -0.0661 0.0835) location=(0 0 0)
        Coordinate hip_flexion_r: motion_type=rotational default_value=1.466 range=(-2.094395 2.094395) clamped=false
        Coordinate hip_adduction_r: motion_type=rotational default_value=-0.037 range=(-2.094395 2.094395)
            clamped=false
        Coordinate hip_rotation_r: motion_type=rotational default_value=0.0974 range=(-2.094395 2.094395) clamped=false
        SpatialTransform: axes_held_at_zero=(translation1 translation2 translation3)
          TransformAxis rotation1: coordinates=hip_flexion_r axis=(0 0 1) LinearFunction(coefficients=1 0)
          TransformAxis rotation2: coordinates=hip_adduction_r axis=(1 0 0) LinearFunction(coefficients=1 0)
          TransformAxis rotation3: coordinates=hip_rotation_r axis=(0 1 0) LinearFunction(coefficients=1 0)
    Body tibia_r: mass=3.7075 mass_center=(0 -0.1867 0) inertia_xx=0.0504 inertia_yy=0.0051 inertia_zz=0.0511
        meshes=(tibia.vtp fibula.vtp)
      CustomJoint knee_r: parent_body=femur_r location_in_parent=(0 0 0) location=(0 0 0)
        Coordinate knee_angle_r: motion_type=rotational default_value=-0.9775 range=(-2.094395 0.1745329) clamped=false
        SpatialTransform: axes_held_at_zero=(rotation2 rotation3 translation3)
          TransformAxis rotation1: coordinates=knee_angle_r axis=(0 0 1) LinearFunction(coefficients=1 0)
          TransformAxis translation1: coordinates=knee_angle_r axis=(1 0 0)
            SimmSpline: x=(-2.0944 -1.74533 -1.39626 -1.0472 -0.698132 -0.349066 -0.174533 0.197344 0.337395 0.490178 1.52146 2.0944)
                y=(-0.0032 0.00179 0.00411 0.0041 0.00212 -0.001 -0.0031 -0.005227 -0.005435 -0.005574 -0.005435 -0.00525)
          TransformAxis translation2: coordinates=knee_angle_r axis=(0 1 0)
            SimmSpline: x=(-2.0944 -1.22173 -0.523599 -0.349066 -0.174533 0.159149 2.0944)
                y=(-0.4226 -0.4082 -0.399 -0.3976 -0.3966 -0.395264 -0.396)
    Body talus_r: mass=0.1 mass_center=(0 0 0) inertia_xx=0.001 inertia_yy=0.001 inertia_zz=0.001 meshes=talus.vtp
      CustomJoint ankle_r: parent_body=tibia_r location_in_parent=(0 -0.43 0) location=(0 0 0)
        Coordinate ankle_angle_r: motion_type=rotational default_value=0.05124 range=(-1.570796 1.570796) clamped=false
        SpatialTransform: axes_held_at_zero=(rotation2 rotation3 translation1 translation2 translation3)
          TransformAxis rotation1: coordinates=ankle_angle_r axis=(-0.1050135 -0.1740224 0.9791263)
              LinearFunction(coefficients=1 0)
    Body calcn_r: mass=1.25 mass_center=(0.1 0.03 0) inertia_xx=0.0014 inertia_yy=0.0039 inertia_zz=0.0041
        meshes=foot.vtp
      CustomJoint subtalar_r: parent_body=talus_r location_in_parent=(-0.04877 -0.04195 0.00792) location=(0 0 0)
        Coordinate subtalar_angle_r: motion_type=rotational default_value=-0.1377 range=(-1.570796 1.570796)
            clamped=false
        SpatialTransform: axes_held_at_zero=(rotation2 rotation3 translation1 translation2 translation3)
          TransformAxis rotation1: coordinates=subtalar_angle_r axis=(0.7871796 0.6047475 -0.1209495)
              LinearFunction(coefficients=1 0)
    Body toes_r: mass=0.2166 mass_center=(0.0346 0.006 -0.0175) inertia_xx=0.0001 inertia_yy=0.0002 inertia_zz=0.0001
        meshes=bofoot.vtp
      CustomJoint mtp_r: parent_body=calcn_r location_in_parent=(0.1788 -0.002 0.00108) location=(0 0 0)
        Coordinate mtp_angle_r: motion_type=rotational default_value=0.10688 range=(-1.570796 1.570796) clamped=false
        SpatialTransform: axes_held_at_zero=(rotation2 rotation3 translation1 translation2 translation3)
          TransformAxis rotation1: coordinates=mtp_angle_r axis=(-0.5809544 0 0.8139361)
              LinearFunction(coefficients=1 0)
    Body Pointer_Toe_R01: mass=1 mass_center=(0 0 0) inertia_xx=1 inertia_yy=1 inertia_zz=1 meshes=sphere.vtp
      WeldJoint Pointer_Toe_R: parent_body=calcn_r location_in_parent=(0.2088 -0.032 -0.00892) location=(0 0 0)
    Body Pointer_Heel_R01: mass=1 mass_center=(0 0 0) inertia_xx=1 inertia_yy=1 inertia_zz=1 meshes=sphere.vtp
      WeldJoint Pointer_Heel_R: parent_body=talus_r location_in_parent=(-0.07 -0.08 0.01) location=(0 0 0)
    Body Pointer_Tibia_R01: mass=1 mass_center=(0 0 0) inertia_xx=1 inertia_yy=1 inertia_zz=1 meshes=sphere.vtp
      WeldJoint Pointer_Tibia_R: parent_body=tibia_r location_in_parent=(0.07 -0.08 0.01) location=(0 0 0)
    Body Pointer_Femur_R01: mass=1 mass_center=(0 0 0) inertia_xx=1 inertia_yy=1 inertia_zz=1 meshes=sphere.vtp
      WeldJoint Pointer_Femur_R: parent_body=femur_r location_in_parent=(-0.05 -0.08 0.05) location=(0 0 0)
    Body Pointer_Gas: mass=1 mass_center=(0 0 0) inertia_xx=1 inertia_yy=1 inertia_zz=1 meshes=sphere.vtp
      WeldJoint Pointer01: parent_body=G_Pedal location_in_parent=(-0.139212 -0.142537 -0.0274764) location=(0 0 0)
    Body Pointer_Brake: mass=1 mass_center=(0 0 0) inertia_xx=1 inertia_yy=1 inertia_zz=1 meshes=sphere.vtp
      WeldJoint Pointer01: parent_body=B_Pedal location_in_parent=(0.0130326 -0.187128 0.039136) location=(0 0 0)
  ForceSet:
    ExpressionBasedPointToPointForce B_Pedal-Spring: body1=B_Pedal body2=Vehicle_Base point1=(-0.005 -0.03 -0.039)
        point2=(0.57933 0.103598 -0.467683) expression=100+1100*(d-0.0883+0.0050)+50*ddot/(abs(ddot)+0.001)
      # expression>30000*(d-0.0834)+100*ddot+0.0001*ddot/(abs(ddot)+0.0001)</expression
    CoordinateLimitForce [values shared by the 10 below unless stated]: compute_dissipation_energy=false
        upper_stiffness=10000 [N*m/degree] lower_stiffness=10000 [N*m/degree] damping=2000 transition=1 [degrees]
    CoordinateLimitForce B_Pedal-ReactTrq: coordinate=B_Pedal_tilt upper_stiffness=2.5 upper_limit=8 [degrees]
        lower_stiffness=2 lower_limit=-0.1 [degrees] damping=0.35 transition=0.1
    CoordinateLimitForce B_Pedal-LimitTrq: coordinate=B_Pedal_tilt upper_stiffness=50 upper_limit=20 lower_stiffness=50
        lower_limit=-0.0001 damping=0.1 transition=0.01
    ExpressionBasedPointToPointForce G_Pedal-Spring: body1=G_Pedal body2=Vehicle_Base point1=(0.02 0.03 0)
        point2=(0.712901 0.0270297 -0.182547) expression=-40+12000*(d-0.0346-0.005)+40*ddot/(abs(ddot)+0.001)
      # point2> -0.013681 0.0375877 0  </point2
      # expression>120000*(d-0.0346)+1*ddot*(d-0.0346)*1000+100*ddot/(abs(ddot)+0.001)*(d-0.0346)*1000</expression
    CoordinateLimitForce G_Pedal-LimitTrq: coordinate=G_Pedal_tilt upper_stiffness=50 upper_limit=22 lower_stiffness=50
        lower_limit=-0.001 damping=0.1 transition=0.01
    CoordinateActuator Act-hip_flexion_r: coordinate=hip_flexion_r optimal_force=100
    CoordinateActuator Act-hip_adduction_r: coordinate=hip_adduction_r optimal_force=100
    CoordinateActuator Act-hip_rotation_r: coordinate=hip_rotation_r optimal_force=100
    CoordinateActuator Act-knee_angle_r: coordinate=knee_angle_r optimal_force=100
    CoordinateActuator Act-ankle_angle_r: coordinate=ankle_angle_r optimal_force=100
    CoordinateActuator Act-subtalar_angle_r: coordinate=subtalar_angle_r optimal_force=100
    CoordinateActuator Act-mtp_angle_r: coordinate=mtp_angle_r optimal_force=100
    ElasticFoundationForce BPedalForce_01: transition_velocity=0.1
      ContactParametersSet contact_parameters:
        ContactParameters: geometry=(B_Pedal_Contact r_foot_01) stiffness=13000000 dissipation=5 static_friction=0.9
            dynamic_friction=0.7 viscous_friction=0.7
    ElasticFoundationForce BPedalForce_02: transition_velocity=0.1
      ContactParametersSet contact_parameters:
        ContactParameters: geometry=(B_Pedal_Contact r_foot_02) stiffness=13000000 dissipation=5 static_friction=0.9
            dynamic_friction=0.7 viscous_friction=0.7
    ElasticFoundationForce BPedalForce_03: transition_velocity=0.1
      ContactParametersSet contact_parameters:
        ContactParameters: geometry=(B_Pedal_Contact r_foot_03) stiffness=13000000 dissipation=5 static_friction=0.9
            dynamic_friction=0.7 viscous_friction=0.7
    ElasticFoundationForce GPedalForce_01: transition_velocity=0.1
      ContactParametersSet contact_parameters:
        ContactParameters: geometry=(G_Pedal_Contact r_foot_01) stiffness=13000000 dissipation=5 static_friction=0.9
            dynamic_friction=0.7 viscous_friction=0.7
    ElasticFoundationForce GPedalForce_02: transition_velocity=0.1
      ContactParametersSet contact_parameters:
        ContactParameters: geometry=(G_Pedal_Contact r_foot_02) stiffness=13000000 dissipation=5 static_friction=0.9
            dynamic_friction=0.7 viscous_friction=0.7
    ElasticFoundationForce GPedalForce_03: transition_velocity=0.1
      ContactParametersSet contact_parameters:
        ContactParameters: geometry=(G_Pedal_Contact r_foot_03) stiffness=13000000 dissipation=5 static_friction=0.9
            dynamic_friction=0.7 viscous_friction=0.7
    ElasticFoundationForce HipForce_Cushion-E: isDisabled=true transition_velocity=0.1
      ContactParametersSet contact_parameters:
        ContactParameters: geometry=(RHip_IT-Contact LHip_IT-Contact RHip_PSIS-Contact LHip_PSIS-Contact r_thigh1 r_thigh2 r_thigh3 Seat_Cushion_Cont)
            stiffness=13000000 dissipation=5 static_friction=0.9 dynamic_friction=0.7 viscous_friction=0.7
    ElasticFoundationForce HipForce_Back: isDisabled=true transition_velocity=0.1
      ContactParametersSet contact_parameters:
        ContactParameters: geometry=(RHip_IT-Contact LHip_IT-Contact RHip_PSIS-Contact LHip_PSIS-Contact)
            stiffness=13000000 dissipation=5 static_friction=0.9 dynamic_friction=0.7 viscous_friction=0.7
    ElasticFoundationForce foot-cs_r_01: transition_velocity=0.1
      ContactParametersSet contact_parameters:
        ContactParameters: geometry=(Floor_Cushion-Contact r_foot_01) stiffness=13000000 dissipation=5
            static_friction=0.9 dynamic_friction=0.7 viscous_friction=0.7
    ElasticFoundationForce foot-cs_r_02: transition_velocity=0.1
      ContactParametersSet contact_parameters:
        ContactParameters: geometry=(Floor_Cushion-Contact r_foot_02) stiffness=13000000 dissipation=5
            static_friction=0.9 dynamic_friction=0.7 viscous_friction=0.7
    ElasticFoundationForce foot-cs_r_03: transition_velocity=0.1
      ContactParametersSet contact_parameters:
        ContactParameters: geometry=(Floor_Cushion-Contact r_foot_03) stiffness=13000000 dissipation=5
            static_friction=0.9 dynamic_friction=0.7 viscous_friction=0.7
    ElasticFoundationForce foot-fp_r_01: transition_velocity=0.1
      ContactParametersSet contact_parameters:
        ContactParameters: geometry=(Floor_Pan-Contact r_foot_01) stiffness=13000000 dissipation=5 static_friction=0.9
            dynamic_friction=0.7 viscous_friction=0.7
    ElasticFoundationForce foot-fp_r_02: transition_velocity=0.1
      ContactParametersSet contact_parameters:
        ContactParameters: geometry=(Floor_Pan-Contact r_foot_02) stiffness=13000000 dissipation=5 static_friction=0.9
            dynamic_friction=0.7 viscous_friction=0.7
    ElasticFoundationForce foot-fp_r_03: transition_velocity=0.1
      ContactParametersSet contact_parameters:
        ContactParameters: geometry=(Floor_Pan-Contact r_foot_03) stiffness=13000000 dissipation=5 static_friction=0.9
            dynamic_friction=0.7 viscous_friction=0.7
    CoordinateLimitForce RHipFxLimitTorque: coordinate=hip_flexion_r upper_limit=100 lower_limit=-100
    CoordinateLimitForce RHipAdLimitTorque: coordinate=hip_adduction_r upper_limit=50 lower_limit=-50
    CoordinateLimitForce RHipRtLimitTorque: coordinate=hip_rotation_r upper_limit=50 lower_limit=-50
    CoordinateLimitForce RKneeLimitTorque: coordinate=knee_angle_r upper_limit=10 lower_limit=-120
    CoordinateLimitForce RAnkleLimitTorque: coordinate=ankle_angle_r upper_limit=20 lower_limit=-50
    CoordinateLimitForce RSubtalarLimitTorque: coordinate=subtalar_angle_r upper_limit=30 lower_limit=-30
    BushingForce RSubtalar_Elast: body_1=calcn_r body_2=toes_r location_body_1=(0.1788 -0.002 0.00108)
        orientation_body_1=(0 0 0) location_body_2=(0 0 0) orientation_body_2=(0 0 0)
        rotational_stiffness=(50.15 50.15 50.15) [Nm/rad] translational_stiffness=(0 0 0) [N/m]
        rotational_damping=(5.015 5.015 5.015) [Nm/(rad/s)] translational_damping=(0 0 0) [N/(m/s)]
    CoordinateLimitForce RMtpLimitTorque: coordinate=mtp_angle_r upper_limit=40 lower_limit=-40
  MarkerSet:
    Marker Marker_toes_r: calcn_r (0.2088 -0.032 -0.00892)
    Marker Marker_heel_r: talus_r (-0.07 -0.08 0.01)
    Marker Marker_tibia_r: tibia_r (0.07 -0.08 0.01)
    Marker Marker_femur_bottom_r: femur_r (-0.05 -0.08 0.05)
  ContactGeometrySet:
    ContactMesh Seat_Cushion_Cont: body_name=Seat_Cushion location=(0 0 0) filename=Seat_Cushion_cont.obj
    ContactHalfSpace Floor_Cushion-Contact: body_name=Floor_Cushion location=(0 0.02 0) orientation=(0 0 -1.570796)
    ContactHalfSpace Floor_Pan-Contact: body_name=Floor_Pan location=(0 0.02 0) orientation=(0 0 -1.570796)
    ContactSphere RHip_IT-Contact: body_name=pelvis location=(-0.09 -0.07 0.04) radius=0.06
    ContactSphere LHip_IT-Contact: body_name=pelvis location=(-0.09 -0.07 -0.04) radius=0.06
    ContactSphere RHip_PSIS-Contact: body_name=pelvis location=(-0.12 0.04 0.07) radius=0.06
    ContactSphere LHip_PSIS-Contact: body_name=pelvis location=(-0.12 0.04 -0.07) radius=0.06
    ContactSphere r_thigh1: body_name=femur_r location=(-0.05 -0.08 0.05) radius=0.01
    ContactSphere r_thigh2: body_name=femur_r location=(-0.0425 -0.25 0.02) radius=0.01
    ContactSphere r_thigh3: body_name=femur_r location=(0 -0.42 0) radius=0.05
    ContactMesh r_foot_01: body_name=talus_r location=(0 0 0) filename=foot_r_a3_01.obj
    ContactMesh r_foot_02: body_name=calcn_r location=(0 0 0) filename=foot_r_a3_02.obj
    ContactMesh r_foot_03: body_name=toes_r location=(0 0 0) filename=foot_r_a3_03.obj
    ContactMesh B_Pedal_Contact: body_name=B_Pedal location=(0 0 0) filename=B_Pedal_pad3.obj
    ContactMesh G_Pedal_Contact: body_name=G_Pedal location=(0 0 0) filename=G_Pedal_pad3.obj
