# OpenSim document version 20302
IKTool subject01:
  results_directory: ../IKResults
  model_file: ../TwoLinkArmModel.osim
  accuracy: 0.00001
  marker_file: ../MarkerData/two_link_01.trc
  time_range: 0.5 4
  report_errors: true
  output_motion_file: ../IKResults/TwoLink_ik.mot
  IKTaskSet TwoLink_IK:
    IKMarkerTask Link2_Marker: apply=true weight=1
    IKMarkerTask Base_Marker_1: apply=true weight=0.5
    IKMarkerTask Base_Marker_2: apply=true weight=0.5
    IKMarkerTask Base_Marker_3: apply=true weight=0.5
