# OpenSim document version 30000
Model TwoLinkArm:
  length_units: m
  force_units: N
  gravity: 0 -9.80665 0
  credits:
    Author: Kenechukwu Mbanisi License: Creative Commons (CCBY 3.0). You are free to distribute, remix, tweak, and build upon this work, even commercially, as long as you credit us for the original creation. http://creativecommons.org/licenses/by/3.0/
  BodySet:
    Body ground: mass=0 mass_center=(0 0 0) inertia_xx=1 inertia_yy=1 inertia_zz=1 meshes=checkered_floor.vtp
    Body link1: mass=10 mass_center=(0.5 0 0) inertia_xx=0.833 inertia_yy=0 inertia_zz=0.833 meshes=linkage1.vtp
      CustomJoint joint1: parent_body=ground location_in_parent=(0.05 0 0) location=(0 0 0)
        Coordinate joint_1: motion_type=rotational default_value=1.4 range=(-1.570796 3.141593) clamped=true
        SpatialTransform: axes_held_at_zero=(rotation2 rotation3 translation1 translation2 translation3)
          TransformAxis rotation1: coordinates=joint_1 axis=(0 0 1) LinearFunction(coefficients=1 0)
    Body link2: mass=5 mass_center=(0.5 0 0) inertia_xx=0.417 inertia_yy=0 inertia_zz=0.417 meshes=linkage1.vtp
      PinJoint joint2: parent_body=link1 location_in_parent=(0.25 0 0) location=(0 0 0)
        Coordinate joint_2: motion_type=rotational default_value=0.7 range=(-2 2) clamped=true
    Body B_Pedal: mass=0.582 mass_center=(0.025806 -0.0934156 0.0190881) inertia_xx=3.99395e-9 inertia_yy=0.733473e-9
        inertia_zz=3.78862e-9 inertia_xy=0.148338e-9 inertia_xz=-0.822541e-12 inertia_yz=1.02445e-9
        meshes=B_Pedal_2.stl
      PinJoint B_Pedal-Vehicle: parent_body=ground location_in_parent=(0.28 0.559598 -0.05) location=(0 0 0)
        Coordinate B_Pedal_tilt: motion_type=rotational default_value=0 range=(0 0.5235988) clamped=true
    Body G_Pedal: mass=0.0816 mass_center=(-0.060736 -0.083164 -0.013207) inertia_xx=0.27543e-9 inertia_yy=0.231347e-9
        inertia_zz=0.469878e-9 inertia_xy=-0.213794e-9 inertia_xz=-0.0453107e-9 inertia_yz=-0.047315e-9
        meshes=G_Pedal.stl
      PinJoint G_Pedal-Vehicle: parent_body=ground location_in_parent=(0.42 0.255558 0.02) location=(0 0 0)
        Coordinate G_Pedal_tilt: motion_type=rotational default_value=0 range=(0 0.3490659) clamped=true
    Body B_Pedal_Pot: mass=1 mass_center=(0 0 0) inertia_xx=1 inertia_yy=1 inertia_zz=1 meshes=sphere.vtp
      WeldJoint Pointer01: parent_body=B_Pedal location_in_parent=(0.6062112 -0.2712833 0.0379159) location=(0 0 0)
    Body G_Pedal_Pot: mass=1 mass_center=(0 0 0) inertia_xx=1 inertia_yy=1 inertia_zz=1 meshes=sphere.vtp
      WeldJoint Pointer01: parent_body=G_Pedal location_in_parent=(-0.01571353 -0.211501 -0.02685693) location=(0 0 0)
    Body G_Pedal2: mass=5 mass_center=(0 0 0) inertia_xx=1 inertia_yy=1 inertia_zz=1 meshes=checkered_floor.vtp
      SliderJoint: parent_body=ground location_in_parent=(0.3 0.15 0) location=(0 0.15 0)
        Coordinate transX: motion_type=translational default_value=0 range=(-10 10) clamped=false
    Body Pointer_Link2_Marker_1: mass=0 mass_center=(0 0 0) inertia_xx=0 inertia_yy=0 inertia_zz=0 meshes=sphere.vtp
      WeldJoint Pointer01: parent_body=link2 location_in_parent=(0.28 0 0) location=(0 0 0)
    Body Pointer_Link2_Marker_2: mass=0 mass_center=(0 0 0) inertia_xx=0 inertia_yy=0 inertia_zz=0 meshes=sphere.vtp
      WeldJoint Pointer02: parent_body=link2 location_in_parent=(0.28 0 0.1) location=(0 0 0)
    Body Pointer_Link2_Marker_3: mass=0 mass_center=(0 0 0) inertia_xx=0 inertia_yy=0 inertia_zz=0 meshes=sphere.vtp
      WeldJoint Pointer03: parent_body=link2 location_in_parent=(0.28 0.1 0) location=(0 0 0)
    Body Pointer_Link1_Marker_1: mass=0 mass_center=(0 0 0) inertia_xx=0 inertia_yy=0 inertia_zz=0 meshes=sphere.vtp
      WeldJoint Pointer04: parent_body=link1 location_in_parent=(0.25 0 0) location=(0 0 0)
    Body Pointer_Link1_Marker_2: mass=0 mass_center=(0 0 0) inertia_xx=0 inertia_yy=0 inertia_zz=0 meshes=sphere.vtp
      WeldJoint Pointer04: parent_body=link1 location_in_parent=(0.25 0 0.1) location=(0 0 0)
    Body Pointer_Link1_Marker_3: mass=0 mass_center=(0 0 0) inertia_xx=0 inertia_yy=0 inertia_zz=0 meshes=sphere.vtp
      WeldJoint Pointer04: parent_body=link1 location_in_parent=(0.25 0.1 0) location=(0 0 0)
    Body Pointer_Gas: mass=1 mass_center=(0 0 0) inertia_xx=1 inertia_yy=1 inertia_zz=1 meshes=sphere.vtp
      WeldJoint Pointer01: parent_body=G_Pedal location_in_parent=(-0.139212 -0.142537 -0.0274764) location=(0 0 0)
    Body Pointer_Brake: mass=1 mass_center=(0 0 0) inertia_xx=1 inertia_yy=1 inertia_zz=1 meshes=sphere.vtp
      WeldJoint Pointer01: parent_body=B_Pedal location_in_parent=(0.0130326 -0.187128 0.039136) location=(0 0 0)
  ForceSet:
    CoordinateActuator joint_1_actuator: coordinate=joint_1 optimal_force=100
    CoordinateActuator joint_2_actuator: coordinate=joint_2 optimal_force=100
    ExpressionBasedPointToPointForce B_Pedal-Spring: body1=B_Pedal body2=ground point1=(-0.005 -0.03 -0.039)
        point2=(0.24 0.603598 -0.105) expression=100+1100*(d-0.0883+0.0050)+50*ddot/(abs(ddot)+0.001)
      # expression>30000*(d-0.0834)+100*ddot+0.0001*ddot/(abs(ddot)+0.0001)</expression
    CoordinateLimitForce B_Pedal-ReactTrq: coordinate=B_Pedal_tilt upper_stiffness=2.5 [N*m/degree]
        upper_limit=8 [degrees] lower_stiffness=2 [N*m/degree] lower_limit=-0.1 [degrees] damping=0.35
        transition=0.1 [degrees] compute_dissipation_energy=false
    CoordinateLimitForce B_Pedal-LimitTrq: coordinate=B_Pedal_tilt upper_stiffness=50 upper_limit=20 lower_stiffness=50
        lower_limit=-0.0001 damping=0.1 transition=0.01 compute_dissipation_energy=false
    ExpressionBasedPointToPointForce G_Pedal-Spring: body1=G_Pedal body2=ground point1=(0.02 0.03 0)
        point2=(0.406319 0.293146 0.02) expression=-40+12000*(d-0.0346-0.005)+40*ddot/(abs(ddot)+0.001)
      # point2> -0.013681 0.0375877 0  </point2
      # expression>120000*(d-0.0346)+1*ddot*(d-0.0346)*1000+100*ddot/(abs(ddot)+0.001)*(d-0.0346)*1000</expression
    CoordinateLimitForce G_Pedal-LimitTrq: coordinate=G_Pedal_tilt upper_stiffness=50 upper_limit=22 lower_stiffness=50
        lower_limit=-0.001 damping=0.1 transition=0.01 compute_dissipation_energy=false
    BushingForce: body_1=ground body_2=G_Pedal2 location_body_1=(0.3 0.15 0) orientation_body_1=(0 0 0)
        location_body_2=(0 0.15 0) orientation_body_2=(0 0 0) rotational_stiffness=(0 0 0) [Nm/rad]
        translational_stiffness=(40000 0 0) [N/m] rotational_damping=(0 0 4) [Nm/(rad/s)]
        translational_damping=(1000 0 0) [N/(m/s)]
    ElasticFoundationForce BPedalForce_01: transition_velocity=0.1
      ContactParametersSet contact_parameters:
        ContactParameters: geometry=(B_Pedal_Contact link1_contact link2_contact) stiffness=13000000 dissipation=5
            static_friction=0.9 dynamic_friction=0.7 viscous_friction=0.7
    ElasticFoundationForce GPedalForce_01: transition_velocity=0.1
      ContactParametersSet contact_parameters:
        ContactParameters: geometry=(G_Pedal_Contact link1_contact link2_contact) stiffness=13000000 dissipation=5
            static_friction=0.9 dynamic_friction=0.7 viscous_friction=0.7
  MarkerSet:
    Marker Link2_Marker_1: link2 (0.28 0 0)
    Marker Link2_Marker_2: link2 (0.28 0 0.1)
    Marker Link2_Marker_3: link2 (0.28 0.1 0)
    Marker Link1_Marker_1: link1 (0.25 0 0)
    Marker Link1_Marker_2: link1 (0.25 0 0.1)
    Marker Link1_Marker_3: link1 (0.25 0.1 0)
    Marker Base_Marker_1: ground (0.1 0 0)
    Marker Base_Marker_2: ground (0 0.1 0)
    Marker Base_Marker_3: ground (0 0 0.1)
    Marker B_pedal_sp1: B_Pedal (-0.005 -0.03 -0.039)
    Marker B_pedal_sp2: ground (0.24 0.603598 -0.105)
    Marker G_pedal_sp1: G_Pedal (0.02 0.03 0)
    Marker G_pedal_sp2: ground (0.406319 0.293146 0.02)
  ContactGeometrySet:
    ContactMesh link2_contact: body_name=link2 location=(0.25 0.05 0) filename=foot_l_a3_01.obj
    ContactMesh link1_contact: body_name=link1 location=(0.25 0.05 0) filename=foot_l_a3_01.obj
    ContactMesh B_Pedal_Contact: body_name=B_Pedal location=(0 0 0) filename=B_Pedal_pad3.obj
    ContactMesh G_Pedal_Contact: body_name=G_Pedal location=(0 0 0) filename=G_Pedal_pad3.obj
