# OpenSim document version 30000
Model Pedal_Stiffness:
  length_units: meters
  force_units: N
  gravity: 0 -9.80665 0
  credits:
    Delp S.L., Loan J.P., Hoy M.G., Zajac F.E., Topp E.L., Rosen J.M., Thelen D.G., Anderson F.C., Seth A. Notes: 3D, 23 DOF gait model created by D.G. Thelen, Univ. of Wisconsin-Madison, and Ajay Seth, Frank C. Anderson, and Scott L. Delp, Stanford University. Lower extremity joint defintions based on Delp et al. (1990). Low back joint and anthropometry based on Anderson and Pandy (1999, 2001). Planar knee model of Yamaguchi and Zajac (1989). Seth replaced tibia translation constraints with a CustomJoint for the knee and removed the patella to eliminate all kinematic constraints; insertions of the quadrucepts are handled with moving points in the tibia frame as defined by Delp 1990. License: Creative Commons (CCBY 3.0). You are free to distribute, remix, tweak, and build upon this work, even commercially, as long as you credit us for the original creation. http://creativecommons.org/licenses/by/3.0/ More Information: http://simtk-confluence.stanford.edu:8080/display/OpenSim/Gait+2392+and+2354+Models
  publications:
    Delp, S.L., Loan, J.P., Hoy, M.G., Zajac, F.E., Topp E.L., Rosen, J.M.: An interactive graphics-based model of the lower extremity to study orthopaedic surgical procedures, IEEE Transactions on Biomedical Engineering, vol. 37, pp. 757-767, 1990. Yamaguchi G.T., Zajac F.E.: A planar model of the knee joint to characterize the knee extensor mechanism." J . Biomecl7. vol. 21. pp. 1-10. 1989. Anderson F.C., Pandy M.G.: A dynamic optimization solution for vertical jumping in three dimensions. Computer Methods in Biomechanics and Biomedical Engineering 2:201-231, 1999. Anderson F.C., Pandy M.G.: Dynamic optimization of human walking. Journal of Biomechanical Engineering 123:381-390, 2001.
  BodySet:
    Body ground: mass=0 mass_center=(0 0 0) inertia_xx=0 inertia_yy=0 inertia_zz=0 meshes=treadmill.vtp
    Body Vehicle_Base: mass=1690 mass_center=(0 0 0) inertia_xx=615.167 inertia_yy=3163.74 inertia_zz=2861.77
        meshes=(arrow.vtp Vehicle_Base_2.stl)
      WeldJoint ground_vehicle: parent_body=ground location_in_parent=(0.25802 -0.043748 0.388833) location=(0 0 0)
    Body B_Pedal: mass=0.582 mass_center=(0.025806 -0.0934156 0.0190881) inertia_xx=0.00334 inertia_yy=0.00055
        inertia_zz=0.00312 meshes=B_Pedal_2.stl
      CustomJoint B_Pedal-Vehicle: parent_body=Vehicle_Base location_in_parent=(0.61933 0.059598 -0.412683)
          location=(0 0 0)
        Coordinate B_Pedal_tilt: motion_type=rotational default_value=0 range=(0 0.5235988) clamped=false
        SpatialTransform: axes_held_at_zero=(rotation2 rotation3 translation1 translation2 translation3)
          TransformAxis rotation1: coordinates=B_Pedal_tilt axis=(0 0 1) LinearFunction(coefficients=1 0)
    Body G_Pedal: mass=0.0816 mass_center=(-0.060736 -0.083164 -0.013207) inertia_xx=0.00027 inertia_yy=0.00023
        inertia_zz=0.00047 meshes=G_Pedal.stl
      CustomJoint G_Pedal-Vehicle: parent_body=Vehicle_Base location_in_parent=(0.726582 -0.010558 -0.182547)
          location=(0 0 0)
        Coordinate G_Pedal_tilt: motion_type=rotational default_value=0 range=(0 0.3490659) clamped=false
        SpatialTransform: axes_held_at_zero=(rotation2 rotation3 translation1 translation2 translation3)
          TransformAxis rotation1: coordinates=G_Pedal_tilt axis=(0 0 1) LinearFunction(coefficients=1 0)
    Body Tester_Ball-G_Pedal: mass=1 mass_center=(0 0 0) inertia_xx=1 inertia_yy=1 inertia_zz=1 meshes=sphere.vtp
      SliderJoint Tester_Sld-G_Pedal: parent_body=Vehicle_Base location_in_parent=(0.575 -0.125 -0.21)
          orientation_in_parent=(0 0 -0.3) location=(0 0 0) orientation=(0 0 -0.3)
        Coordinate Tester_Sld-G_Pedal: motion_type=translational default_value=0 range=(-0.05 0.25) clamped=false
    Body Tester_Ball-B_Pedal: mass=1 mass_center=(0 0 0) inertia_xx=1 inertia_yy=1 inertia_zz=1 meshes=sphere.vtp
      SliderJoint Tester_Sld-B_Pedal: parent_body=Vehicle_Base location_in_parent=(0.58 -0.12 -0.365)
          orientation_in_parent=(0 0 0.1) location=(0 0 0)
        Coordinate Tester_Sld-B_Pedal: motion_type=translational default_value=0 range=(-0.05 0.25) clamped=false
    Body Pointer_Toe_R01: mass=1 mass_center=(0 0 0) inertia_xx=1 inertia_yy=1 inertia_zz=1 meshes=sphere.vtp
      WeldJoint Pointer_Toe_R: parent_body=ground location_in_parent=(0.903156 -0.0775656 -0.00476187) location=(0 0 0)
  ForceSet:
    CoordinateActuator Act-Tester-G_Pedal: coordinate=Tester_Sld-G_Pedal optimal_force=10
    CoordinateActuator Act-Tester-B_Pedal: coordinate=Tester_Sld-B_Pedal optimal_force=1
    ElasticFoundationForce GPedalForce: transition_velocity=0.1
      ContactParametersSet contact_parameters:
        ContactParameters: geometry=(G_Pedal_Contact Tester-G_Pedal) stiffness=13000000 dissipation=5
            static_friction=0.9 dynamic_friction=0.7 viscous_friction=0.7
    ElasticFoundationForce BPedalForce: transition_velocity=0.1
      ContactParametersSet contact_parameters:
        ContactParameters: geometry=(B_Pedal_Contact Tester-B_Pedal) stiffness=23000000 dissipation=1 static_friction=0
            dynamic_friction=0 viscous_friction=0
    BushingForce B_Pedal_bushing: isDisabled=true body_1=Vehicle_Base body_2=B_Pedal
        location_body_1=(0.61933 0.059598 -0.412683) orientation_body_1=(0 0 0) location_body_2=(0 0 0)
        orientation_body_2=(0 0 0) rotational_stiffness=(0.05 0.05 0.05) [Nm/rad] translational_stiffness=(0 0 0) [N/m]
        rotational_damping=(0.001 0.001 0.001) [Nm/(rad/s)] translational_damping=(0 0 0) [N/(m/s)]
    ExpressionBasedBushingForce B_Pedal_bushing_Exp: isDisabled=true body_1=Vehicle_Base body_2=B_Pedal
        location_body_1=(0.61933 0.059598 -0.412683) orientation_body_1=(0 0 0) location_body_2=(0 0 0)
        orientation_body_2=(0 0 0) Mx_expression=0 My_expression=0 Mz_expression=0 Fx_expression=0 Fy_expression=0
        Fz_expression=0
    ExpressionBasedPointToPointForce B_Pedal-Spring: body1=B_Pedal body2=Vehicle_Base point1=(-0.005 -0.03 -0.039)
        point2=(0.52933 0.053598 -0.467683) expression=60000*(d-0.0897)+1*ddot+0.1*ddot/(abs(ddot)+0.0001)
    CoordinateLimitForce B_Pedal-ReactTrq: isDisabled=true coordinate=B_Pedal_tilt upper_stiffness=2 [N*m/degree]
        upper_limit=3 [degrees] lower_stiffness=2 [N*m/degree] lower_limit=0 [degrees] damping=0.05
        transition=0.1 [degrees] compute_dissipation_energy=false
    CoordinateLimitForce B_Pedal-LimitTrq: coordinate=B_Pedal_tilt upper_stiffness=100 upper_limit=25
        lower_stiffness=100 lower_limit=-0.0001 damping=05 transition=0.01 compute_dissipation_energy=false
    BushingForce G_Pedal_bushing: isDisabled=true body_1=Vehicle_Base body_2=G_Pedal
        location_body_1=(0.726582 -0.010558 -0.182547) orientation_body_1=(0 0 0) location_body_2=(0 0 0)
        orientation_body_2=(0 0 0) rotational_stiffness=(0.015 0.015 0.015) translational_stiffness=(0 0 0)
        rotational_damping=(0.0001 0.0001 0.0001) translational_damping=(0 0 0)
    FunctionBasedBushingForce G_Pedal_bushing_Func: body_1=Vehicle_Base body_2=G_Pedal
        location_body_1=(0.726582 -0.010558 -0.182547) orientation_body_1=(0 0 0) location_body_2=(0 0 0)
        orientation_body_2=(0 0 0) rotational_damping=(0 0 0)
      m_z_theta_z_function: SimmSpline: x=(0 0.001 0.003 0.006 0.01 0.011 0.012 0.02 0.04 0.1 0.15 0.2 0.25 0.3 0.35 0.4 0.45)
          y=(3 3.01101 3.03306 3.06625 3.1107 3.12185 3.13301 3.2228 3.4512 4.17 4.8075 5.48 6.1875 6.93 7.7075 8.52 9.3675)
    CoordinateLimitForce G_Pedal-ReactTrq: isDisabled=true coordinate=G_Pedal_tilt upper_stiffness=0.1 upper_limit=0.65
        lower_stiffness=1 lower_limit=0 damping=0.001 transition=0.1 compute_dissipation_energy=false
    CoordinateLimitForce G_Pedal-LimitTrq: coordinate=G_Pedal_tilt upper_stiffness=0.5 upper_limit=25 lower_stiffness=1
        lower_limit=-0.001 damping=0.01 transition=0.01 compute_dissipation_energy=false
  MarkerSet:
    Marker B_pedal_sp1: B_Pedal (-0.005 -0.03 -0.039)
    Marker B_pedal_sp2: Vehicle_Base (0.52933 0.053598 -0.467683)
  ContactGeometrySet:
    ContactMesh B_Pedal_Contact: body_name=B_Pedal location=(0 0 0) filename=B_Pedal_pad3.obj
    ContactMesh G_Pedal_Contact: body_name=G_Pedal location=(0 0 0) filename=G_Pedal_pad3.obj
    ContactSphere Tester-G_Pedal: body_name=Tester_Ball-G_Pedal location=(0 0 0) radius=0.025
    ContactSphere Tester-B_Pedal: body_name=Tester_Ball-B_Pedal location=(0 0 0) radius=0.05
  ControllerSet Controllers:
    PrescribedController Ctrl-Tester-G_Pedal: actuator_list=Act-Tester-G_Pedal
      FunctionSet ControlFunctions: PiecewiseLinearFunction(x=0 0.5 1, y=0 8 0)
    PrescribedController Ctrl-Tester-B_Pedal: actuator_list=Act-Tester-B_Pedal
      FunctionSet ControlFunctions: PiecewiseLinearFunction(x=0 0.5 0.8 1, y=0 150 32 12)
