# OpenSim document version 30000
Model Pedal_Stiffness:
  length_units: meters
  force_units: N
  gravity: 0 -9.80665 0
  credits:
    Delp S.L., Loan J.P., Hoy M.G., Zajac F.E., Topp E.L., Rosen J.M., Thelen D.G., Anderson F.C., Seth A. Notes: 3D, 23 DOF gait model created by D.G. Thelen, Univ. of Wisconsin-Madison, and Ajay Seth, Frank C. Anderson, and Scott L. Delp, Stanford University. Lower extremity joint defintions based on Delp et al. (1990). Low back joint and anthropometry based on Anderson and Pandy (1999, 2001). Planar knee model of Yamaguchi and Zajac (1989). Seth replaced tibia translation constraints with a CustomJoint for the knee and removed the patella to eliminate all kinematic constraints; insertions of the quadrucepts are handled with moving points in the tibia frame as defined by Delp 1990. License: Creative Commons (CCBY 3.0). You are free to distribute, remix, tweak, and build upon this work, even commercially, as long as you credit us for the original creation. http://creativecommons.org/licenses/by/3.0/ More Information: http://simtk-confluence.stanford.edu:8080/display/OpenSim/Gait+2392+and+2354+Models
  publications:
    Delp, S.L., Loan, J.P., Hoy, M.G., Zajac, F.E., Topp E.L., Rosen, J.M.: An interactive graphics-based model of the lower extremity to study orthopaedic surgical procedures, IEEE Transactions on Biomedical Engineering, vol. 37, pp. 757-767, 1990. Yamaguchi G.T., Zajac F.E.: A planar model of the knee joint to characterize the knee extensor mechanism." J . Biomecl7. vol. 21. pp. 1-10. 1989. Anderson F.C., Pandy M.G.: A dynamic optimization solution for vertical jumping in three dimensions. Computer Methods in Biomechanics and Biomedical Engineering 2:201-231, 1999. Anderson F.C., Pandy M.G.: Dynamic optimization of human walking. Journal of Biomechanical Engineering 123:381-390, 2001.
  BodySet:
    Body ground: mass=0 mass_center=(0 0 0) inertia_xx=0 inertia_yy=0 inertia_zz=0 meshes=treadmill.vtp
    Body Vehicle_Base: mass=1690 mass_center=(0 0 0) inertia_xx=615.167 inertia_yy=3163.74 inertia_zz=2861.77
        meshes=(arrow.vtp Vehicle_Base_2.stl)
      WeldJoint ground_vehicle: parent_body=ground location_in_parent=(0.25802 -0.043748 0.388833) location=(0 0 0)
    Body B_Pedal: mass=0.582 mass_center=(0.025806 -0.0934156 0.0190881) inertia_xx=3.99395e-9 inertia_yy=0.733473e-9
        inertia_zz=3.78862e-9 inertia_xy=0.148338e-9 inertia_xz=-0.822541e-12 inertia_yz=1.02445e-9
        meshes=B_Pedal_2.stl
      PinJoint B_Pedal-Vehicle: parent_body=Vehicle_Base location_in_parent=(0.61933 0.059598 -0.412683)
          location=(0 0 0)
        Coordinate B_Pedal_tilt: motion_type=rotational default_value=0 range=(0 0.5235988) clamped=true
    Body G_Pedal: mass=0.0816 mass_center=(-0.060736 -0.083164 -0.013207) inertia_xx=0.27543e-9 inertia_yy=0.231347e-9
        inertia_zz=0.469878e-9 inertia_xy=-0.213794e-9 inertia_xz=-0.0453107e-9 inertia_yz=-0.047315e-9
        meshes=G_Pedal.stl
      PinJoint G_Pedal-Vehicle: parent_body=Vehicle_Base location_in_parent=(0.726582 -0.010558 -0.182547)
          location=(0 0 0)
        Coordinate G_Pedal_tilt: motion_type=rotational default_value=0 range=(0 0.3490659) clamped=true
    Body Pointer_Brake: mass=1 mass_center=(0 0 0) inertia_xx=1 inertia_yy=1 inertia_zz=1 meshes=sphere.vtp
      WeldJoint Pointer01: parent_body=B_Pedal location_in_parent=(0.0130326 -0.187128 0.039136) location=(0 0 0)
    Body Pointer_Gas: mass=1 mass_center=(0 0 0) inertia_xx=1 inertia_yy=1 inertia_zz=1 meshes=sphere.vtp
      WeldJoint Pointer01: parent_body=G_Pedal location_in_parent=(-0.139212 -0.142537 -0.0274764) location=(0 0 0)
    Body Tester_Ball-B_Pedal: mass=1 mass_center=(0 0 0) inertia_xx=1 inertia_yy=1 inertia_zz=1 meshes=sphere.vtp
      SliderJoint Tester_Sld-B_Pedal: parent_body=Vehicle_Base location_in_parent=(0.58 -0.12 -0.365)
          orientation_in_parent=(0 0 0.1) location=(0 0 0)
        Coordinate Tester_Sld-B_Pedal: motion_type=translational default_value=0 range=(-0.05 0.25) clamped=false
    Body Tester_Ball-G_Pedal: mass=1 mass_center=(0 0 0) inertia_xx=1 inertia_yy=1 inertia_zz=1 meshes=sphere.vtp
      SliderJoint Tester_Sld-G_Pedal: parent_body=Vehicle_Base location_in_parent=(0.575 -0.125 -0.21)
          orientation_in_parent=(0 0 -0.3) location=(0 0 0) orientation=(0 0 -0.3)
        Coordinate Tester_Sld-G_Pedal: motion_type=translational default_value=0 range=(-0.05 0.25) clamped=false
    Body Pointer_Toe_R01: mass=1 mass_center=(0 0 0) inertia_xx=1 inertia_yy=1 inertia_zz=1 meshes=sphere.vtp
      WeldJoint Pointer_Toe_R: parent_body=ground location_in_parent=(0.903156 -0.0775656 -0.00476187) location=(0 0 0)
  ForceSet:
    CoordinateActuator Act-Tester-B_Pedal: coordinate=Tester_Sld-B_Pedal optimal_force=1
    CoordinateActuator Act-Tester-G_Pedal: coordinate=Tester_Sld-G_Pedal optimal_force=10
    ElasticFoundationForce BPedalForce: transition_velocity=0.1
      ContactParametersSet contact_parameters:
        ContactParameters: geometry=(B_Pedal_Contact Tester-B_Pedal) stiffness=13000000 dissipation=1 static_friction=0
            dynamic_friction=0 viscous_friction=0
    ElasticFoundationForce GPedalForce: transition_velocity=0.1
      ContactParametersSet contact_parameters:
        ContactParameters: geometry=(G_Pedal_Contact Tester-G_Pedal) stiffness=13000000 dissipation=1 static_friction=0
            dynamic_friction=0 viscous_friction=0
    BushingForce B_Pedal_bushing: isDisabled=true body_1=Vehicle_Base body_2=B_Pedal
        location_body_1=(0.61933 0.059598 -0.412683) orientation_body_1=(0 0 0) location_body_2=(0 0 0)
        orientation_body_2=(0 0 0) rotational_stiffness=(0.05 0.05 0.05) [Nm/rad] translational_stiffness=(0 0 0) [N/m]
        rotational_damping=(0.001 0.001 0.001) [Nm/(rad/s)] translational_damping=(0 0 0) [N/(m/s)]
    ExpressionBasedPointToPointForce B_Pedal-Spring: body1=B_Pedal body2=Vehicle_Base point1=(-0.005 -0.03 -0.039)
        point2=(0.57933 0.103598 -0.467683) expression=100+1100*(d-0.0883+0.0050)+50*ddot/(abs(ddot)+0.001)
      # expression>30000*(d-0.0834)+100*ddot+0.0001*ddot/(abs(ddot)+0.0001)</expression
    CoordinateLimitForce B_Pedal-ReactTrq: coordinate=B_Pedal_tilt upper_stiffness=2.5 [N*m/degree]
        upper_limit=8 [degrees] lower_stiffness=2 [N*m/degree] lower_limit=-0.1 [degrees] damping=0.35
        transition=0.1 [degrees] compute_dissipation_energy=false
    CoordinateLimitForce B_Pedal-LimitTrq: coordinate=B_Pedal_tilt upper_stiffness=50 upper_limit=20 lower_stiffness=50
        lower_limit=-0.0001 damping=0.1 transition=0.01 compute_dissipation_energy=false
    BushingForce G_Pedal_bushing: isDisabled=true body_1=Vehicle_Base body_2=G_Pedal
        location_body_1=(0.726582 -0.010558 -0.182547) orientation_body_1=(0 0 0) location_body_2=(0 0 0)
        orientation_body_2=(0 0 0) rotational_stiffness=(0.015 0.015 0.015) translational_stiffness=(0 0 0)
        rotational_damping=(0.0001 0.0001 0.0001) translational_damping=(0 0 0)
    ExpressionBasedPointToPointForce G_Pedal-Spring: body1=G_Pedal body2=Vehicle_Base point1=(0.02 0.03 0)
        point2=(0.712901 0.0270297 -0.182547) expression=-40+12000*(d-0.0346-0.005)+40*ddot/(abs(ddot)+0.001)
      # point2> -0.013681 0.0375877 0  </point2
      # expression>120000*(d-0.0346)+1*ddot*(d-0.0346)*1000+100*ddot/(abs(ddot)+0.001)*(d-0.0346)*1000</expression
    CoordinateLimitForce G_Pedal-ReactTrq: isDisabled=true coordinate=G_Pedal_tilt upper_stiffness=0.1
        upper_limit=0.001 lower_stiffness=1 lower_limit=-0.001 damping=0.02 transition=0.01
        compute_dissipation_energy=false
    CoordinateLimitForce G_Pedal-LimitTrq: coordinate=G_Pedal_tilt upper_stiffness=50 upper_limit=22 lower_stiffness=50
        lower_limit=-0.001 damping=1 transition=0.01 compute_dissipation_energy=false
  MarkerSet:
    Marker B_pedal_sp1: B_Pedal (-0.005 -0.03 -0.039)
    Marker B_pedal_sp2: Vehicle_Base (0.57933 0.103598 -0.467683)
    Marker G_pedal_sp1: G_Pedal (0.02 0.03 0)
    Marker G_pedal_sp2: Vehicle_Base (0.712901 0.0270297 -0.182547)
  ContactGeometrySet:
    ContactMesh B_Pedal_Contact: body_name=B_Pedal location=(0 0 0) filename=B_Pedal_pad3.obj
    ContactMesh G_Pedal_Contact: body_name=G_Pedal location=(0 0 0) filename=G_Pedal_pad3.obj
    ContactSphere Tester-B_Pedal: body_name=Tester_Ball-B_Pedal location=(0 0 0) radius=0.05
    ContactSphere Tester-G_Pedal: body_name=Tester_Ball-G_Pedal location=(0 0 0) radius=0.025
  ControllerSet Controllers:
    PrescribedController Ctrl-Tester-B_Pedal: actuator_list=Act-Tester-B_Pedal
      FunctionSet ControlFunctions:
        PiecewiseLinearFunction: x=(0 0.2 1.5 2.5 3.5 4.8 5) y=(0 5 60 200 60 7 0)
    PrescribedController Ctrl-Tester-G_Pedal: actuator_list=Act-Tester-G_Pedal
      FunctionSet ControlFunctions:
        PiecewiseLinearFunction: x=(0 0.2 1.5 2.5 3.5 4.8 5) y=(0 0.1 2 10 2 0.1 0)
