# OpenSim document version 30000
InverseKinematicsTool:
  results_directory: ./
  constraint_weight: Inf
  accuracy: 1e-5
  marker_file: D:/Kimpara/Data/OpenSim/OpenSim-Workshop_2017/Sample_Model/Simple_Sample/AnalyzeSetup/../MarkerData/two_link_01.trc
  time_range: 0 1
  report_errors: true
  output_motion_file: D:/Kimpara/Data/OpenSim/OpenSim-Workshop_2017/Sample_Model/Simple_Sample/AnalyzeSetup/../Results/two_link_02_ik.mot
  report_marker_locations: false
  IKTaskSet:
    IKMarkerTask Link2_Marker_1: apply=true weight=1
    IKMarkerTask Link2_Marker_2: apply=true weight=0.1
    IKMarkerTask Link2_Marker_3: apply=true weight=0.1
    IKMarkerTask Link1_Marker_1: apply=true weight=0.1
    IKMarkerTask Link1_Marker_2: apply=true weight=0.1
    IKMarkerTask Link1_Marker_3: apply=true weight=0.1
    IKMarkerTask Base_Marker_1: apply=true weight=1
    IKMarkerTask Base_Marker_2: apply=true weight=1
    IKMarkerTask Base_Marker_3: apply=true weight=1
    IKMarkerTask Wall_Marker_1: apply=false weight=1
    IKMarkerTask Wall_Marker_2: apply=false weight=1
    IKMarkerTask Wall_Marker_3: apply=false weight=1
    IKCoordinateTask joint_1: apply=true weight=0 value_type=default_value value=0
    IKCoordinateTask joint_2: apply=true weight=0 value_type=default_value value=0
