# OpenSim document version 30000
InverseKinematicsTool:
  results_directory: ./
  constraint_weight: Inf
  accuracy: 1e-5
  marker_file: ../MarkerData/R_Leg_link_pedal_001.trc
  time_range: 0 0.05
  report_errors: false
  report_marker_locations: false
  IKTaskSet:
    IKMarkerTask Marker_toes_r: apply=true weight=10
    IKMarkerTask Marker_heel_r: apply=true weight=1
    IKMarkerTask Marker_tibia_r: apply=true weight=1
    IKMarkerTask Marker_femur_bottom_r: apply=true weight=1
    IKCoordinateTask subtalar_angle_r: apply=true weight=1 value_type=manual_value value=0
    IKCoordinateTask mtp_angle_r: apply=true weight=1 value_type=manual_value value=0
