# OpenSim document version 30000
InverseKinematicsTool:
  results_directory: ./
  constraint_weight: Inf
  accuracy: 1e-5
  marker_file: ../MarkerData/two_link_01a.trc
  time_range: 0 1
  report_errors: true
  report_marker_locations: false
  IKTaskSet:
    IKMarkerTask Link2_Marker_1: apply=true weight=1
    IKMarkerTask Link2_Marker_2: apply=false weight=1
    IKMarkerTask Link2_Marker_3: apply=false weight=1
    IKMarkerTask Link1_Marker_1: apply=true weight=2
    IKMarkerTask Link1_Marker_2: apply=false weight=1
    IKMarkerTask Link1_Marker_3: apply=false weight=1
    IKMarkerTask Base_Marker_1: apply=false weight=1
    IKMarkerTask Base_Marker_2: apply=false weight=1
    IKMarkerTask Base_Marker_3: apply=false weight=1
    IKMarkerTask Wall_Marker_1: apply=false weight=1
    IKMarkerTask Wall_Marker_2: apply=false weight=1
    IKMarkerTask Wall_Marker_3: apply=false weight=1
