# OpenSim document version 30516
InverseKinematicsTool two_link_pedal_005:
  results_directory: ./
  constraint_weight: Inf
  accuracy: 1e-5
  marker_file: MarkerData\two_link_pedal_005.trc
  time_range: 0.199 0.25
  report_errors: true
  output_motion_file: Out_IK\two_link_pedal_005_ik.mot
  report_marker_locations: false
  IKTaskSet:
    IKMarkerTask Link2_Marker_1: apply=true weight=1
    IKMarkerTask Link2_Marker_2: apply=false weight=1
    IKMarkerTask Link2_Marker_3: apply=false weight=1
    IKMarkerTask Link1_Marker_1: apply=true weight=1.5
    IKMarkerTask Link1_Marker_2: apply=false weight=1
    IKMarkerTask Link1_Marker_3: apply=false weight=1
    IKMarkerTask Base_Marker_1: apply=false weight=1
    IKMarkerTask Base_Marker_2: apply=false weight=1
    IKMarkerTask Base_Marker_3: apply=false weight=1
    IKMarkerTask Wall_Marker_1: apply=false weight=1
    IKMarkerTask Wall_Marker_2: apply=false weight=1
    IKMarkerTask Wall_Marker_3: apply=false weight=1
    IKCoordinateTask joint_1: apply=false weight=1 value_type=default_value value=0
    IKCoordinateTask joint_2: apply=false weight=2 value_type=default_value value=0
