# OpenSim document version 30000
Model TwoLinkArm:
  length_units: m
  force_units: N
  gravity: 0 -9.80665 0
  credits:
    Author: Kenechukwu Mbanisi License: Creative Commons (CCBY 3.0). You are free to distribute, remix, tweak, and build upon this work, even commercially, as long as you credit us for the original creation. http://creativecommons.org/licenses/by/3.0/
  BodySet:
    Body ground: mass=0 mass_center=(0 0 0) inertia_xx=1 inertia_yy=1 inertia_zz=1 meshes=checkered_floor.vtp
    Body link1: mass=10 mass_center=(0.5 0 0) inertia_xx=0.833 inertia_yy=0 inertia_zz=0.833 meshes=linkage1.vtp
      CustomJoint joint1: parent_body=ground location_in_parent=(0.05 0 0) location=(0 0 0)
        Coordinate joint_1: motion_type=rotational default_value=1.4 range=(-1.570796 3.141593) clamped=true
        SpatialTransform: axes_held_at_zero=(rotation2 rotation3 translation1 translation2 translation3)
          TransformAxis rotation1: coordinates=joint_1 axis=(0 0 1) LinearFunction(coefficients=1 0)
    Body link2: mass=5 mass_center=(0.5 0 0) inertia_xx=0.417 inertia_yy=0 inertia_zz=0.417 meshes=linkage1.vtp
      PinJoint joint2: parent_body=link1 location_in_parent=(0.25 0 0) location=(0 0 0)
        Coordinate joint_2: motion_type=rotational default_value=0.7 range=(-2 2) clamped=true
    Body compliantWall: mass=5 mass_center=(0 0 0) inertia_xx=1 inertia_yy=1 inertia_zz=1 meshes=checkered_floor.vtp
      SliderJoint: parent_body=ground location_in_parent=(0.3 0.15 0) location=(0 0.15 0)
        Coordinate transX: motion_type=translational default_value=0 range=(-10 10) clamped=false
    Body Pointer_Link2_Marker_1: mass=0 mass_center=(0 0 0) inertia_xx=0 inertia_yy=0 inertia_zz=0 meshes=sphere.vtp
      WeldJoint Pointer01: parent_body=link2 location_in_parent=(0.28 0 0) location=(0 0 0)
    Body Pointer_Link2_Marker_2: mass=0 mass_center=(0 0 0) inertia_xx=0 inertia_yy=0 inertia_zz=0 meshes=sphere.vtp
      WeldJoint Pointer02: parent_body=link2 location_in_parent=(0.28 0 0.1) location=(0 0 0)
    Body Pointer_Link2_Marker_3: mass=0 mass_center=(0 0 0) inertia_xx=0 inertia_yy=0 inertia_zz=0 meshes=sphere.vtp
      WeldJoint Pointer03: parent_body=link2 location_in_parent=(0.28 0.1 0) location=(0 0 0)
    Body Pointer_Link1_Marker_1: mass=0 mass_center=(0 0 0) inertia_xx=0 inertia_yy=0 inertia_zz=0 meshes=sphere.vtp
      WeldJoint Pointer04: parent_body=link1 location_in_parent=(0.25 0 0) location=(0 0 0)
    Body Pointer_Link1_Marker_2: mass=0 mass_center=(0 0 0) inertia_xx=0 inertia_yy=0 inertia_zz=0 meshes=sphere.vtp
      WeldJoint Pointer04: parent_body=link1 location_in_parent=(0.25 0 0.1) location=(0 0 0)
    Body Pointer_Link1_Marker_3: mass=0 mass_center=(0 0 0) inertia_xx=0 inertia_yy=0 inertia_zz=0 meshes=sphere.vtp
      WeldJoint Pointer04: parent_body=link1 location_in_parent=(0.25 0.1 0) location=(0 0 0)
    Body Pointer_Wall: mass=0 mass_center=(0 0 0) inertia_xx=0 inertia_yy=0 inertia_zz=0 meshes=sphere.vtp
      WeldJoint Pointer0W: parent_body=compliantWall location_in_parent=(0 0.3 0) location=(0 0 0)
  ForceSet:
    CoordinateActuator joint_1_actuator: coordinate=joint_1 optimal_force=100
    CoordinateActuator joint_2_actuator: coordinate=joint_2 optimal_force=100
    BushingForce: body_1=ground body_2=compliantWall location_body_1=(0.3 0.15 0) orientation_body_1=(0 0 0)
        location_body_2=(0 0.15 0) orientation_body_2=(0 0 0) rotational_stiffness=(0 0 0) [Nm/rad]
        translational_stiffness=(40000 0 0) [N/m] rotational_damping=(0 0 4) [Nm/(rad/s)]
        translational_damping=(1000 0 0) [N/(m/s)]
    ElasticFoundationForce Contact1: transition_velocity=0.1
      ContactParametersSet contact_parameters:
        ContactParameters: geometry=(wallContact link1_contact link2_contact) stiffness=13000000 dissipation=5
            static_friction=0.9 dynamic_friction=0.7 viscous_friction=0.7
  MarkerSet:
    Marker Link2_Marker_1: link2 (0.28 0 0)
    Marker Link2_Marker_2: link2 (0.28 0 0.1)
    Marker Link2_Marker_3: link2 (0.28 0.1 0)
    Marker Link1_Marker_1: link1 (0.25 0 0)
    Marker Link1_Marker_2: link1 (0.25 0 0.1)
    Marker Link1_Marker_3: link1 (0.25 0.1 0)
    Marker Base_Marker_1: ground (0.1 0 0)
    Marker Base_Marker_2: ground (0 0.1 0)
    Marker Base_Marker_3: ground (0 0 0.1)
    Marker Wall_Marker_1: compliantWall (0 0.3 0)
    Marker Wall_Marker_2: compliantWall (0 0.4 0)
    Marker Wall_Marker_3: compliantWall (0 0.3 0.1)
  ContactGeometrySet:
    ContactMesh link2_contact: body_name=link2 location=(0.25 0.05 0) filename=foot_l_a3_01.obj
    ContactMesh link1_contact: body_name=link1 location=(0.25 0.05 0) filename=foot_l_a3_01.obj
    ContactHalfSpace wallContact: body_name=compliantWall location=(0 0 0)
